# Kaamerapildi suurus (x, y):
find_map_max(map) :=
    max[0] ← 0
    max[1] ← 0
    for i ∈ 0 .. rows(map) - 1
        for j ∈ 0 .. cols(map) - 1
            continue if map[i, j] == 0
            max[0] ← map[i, j][0] if map[i, j][0] > max[0]
            max[1] ← map[i, j][1] if map[i, j][1] > max[1]
    max
camera := [1280; 1024]
# Kaamera moonutuskonstandid OpenCV'st
k_ocv := [-0.282951537685; 0.0709948036825; -0.00707674255744]
f_ocv := [690.468178533; 690.920736926]
c_ocv := [639.5; 511.5]
c_ocv := camera/2 = [640; 512]
# Ühikteisendus? - edasi ja tagasi
normaliseOCV(p, c, f) := (p - c)/f
denormaliseOCV(p, c, f) := (vectorize(p*f) + c)
# Punkti kauguse ruut:
r2(x, y) := x^2 + y^2
number_of_zeroes(M) :=
    zeroes ← 0
    for x ∈ 0, 1 .. rows(M) - 1
        for y ∈ 0, 1 .. cols(M) - 1
            zeroes ← zeroes + 1 if M[x, y] == 0
    zeroes
multipler_r2(r_2) := 1 + k_ocv[0]*r_2 + k_ocv[1]*r_2^2 + k_ocv[2]*r_2^3
multipler_xy(x, y) := multipler_r2(r2(x, y))
multipler_point(p) := multipler_xy(p[0], p[1])
distort_normalised_point(p) := p*multipler_point(p)
distort_point(p) := denormaliseOCV(distort_normalised_point(normaliseOCV(p, c_ocv, f_ocv)), c_ocv, f_ocv)
number_of_negative(M) :=
    zeroes ← 0
    for x ∈ 0, 1 .. rows(M) - 1
        for y ∈ 0, 1 .. cols(M) - 1
            continue if M[x, y] == 0
            zeroes ← zeroes + 1 if M[x, y][1] < 0
            zeroes ← zeroes + 1 if M[x, y][0] < 0
    zeroes
calculate_inverse_map(map, max_index) :=
    inverse_map[max_index[0], max_index[1]] ← 0
    for x ∈ 0, 1 .. rows(map) - 1
        for y ∈ 0, 1 .. cols(map) - 1
            continue if map[x, y] == 0
            inv_x ← round(map[x, y][0])
            inv_y ← round(map[x, y][1])
            continue if inv_x < 0
            continue if inv_y < 0
            inverse_map[inv_x, inv_y] ← [x; y]
    inverse_map
programmatical_inverse_map(output_width, output_height, more, input_step) :=
    inverse_map[output_height - 1, output_width - 1] ← 0
    for x ∈ 0 - more, 0 - more + input_step .. (output_width + more)
        for y ∈ 0 - more, 0 - more + input_step .. (output_height + more)
            distorted ← distort_point([x; y])
            inv_x ← round(distorted[0])
            inv_y ← round(distorted[1])
            continue if inv_x < 0
            continue if inv_y < 0
            continue if inv_x > output_width - 1
            continue if inv_y > output_height - 1
            inverse_map[inv_y, inv_x] ← [round(x); round(y)]
    inverse_map
# Genereerime mappingu:
additional := [0; 0]
shift := additional
i_map.x := (0 + shift[0] - additional[0] .. camera[0] + shift[0] + additional[0])
i_map.y := (0 + shift[1] - additional[1] .. camera[1] + shift[1] + additional[1])
# Preallocate matrix:
map[camera[0] + shift[1], camera[1] + shift[1]] := 100
map[i_map.x, i_map.y] := distort_point([i_map.x; i_map.y] - shift)
max_map_index := round(find_map_max(map)) = [1155; 955]
more := 500
inverse_map := calculate_inverse_map(map, max_map_index)  # disabled
inverse_map := programmatical_inverse_map(camera[0], camera[1], more, 0.7)
i_map := 0, 15 .. rows(map) - 1
i_inv_map := 0, 15 .. rows(inverse_map) - 1
j_map := 0, 15 .. cols(map) - 1
j_inv_map := 0, 15 .. cols(inverse_map) - 1  # camera[0]
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φ := 2.5
x_harm(fii, t, T) := □  # error: This placeholder is empty.
direction_harm(fii, t, T) := atan2(cos(2*π/T*t + fii), sin(2*π/T*t + fii))
direction_harm(φ, 1, 10) = 3.12832
number_of_negative(inverse_map) = 295590
number_of_zeroes(inverse_map) = 13292
number_of_negative(map) = 0
number_of_zeroes(map) = 0  # sds
prep_for_CSV(M, elemNo) :=
    output[rows(M) - 1, cols(M) - 1] ← 0
    for x ∈ 0 .. cols(M) - 1
        for y ∈ 0 .. rows(M) - 1
            continue if M[y, x] == 0
            output[y, x] ← M[y, x][elemNo]
    output
temp := WRITECSV(prep_for_CSV(inverse_map, 0), "undistort-mapping-back-x.csv")
temp := WRITECSV(prep_for_CSV(inverse_map, 1), "undistort-mapping-back-y.csv")
